<?xml version="1.0" ?>
<Node name="lroot" gravity="0 -9.8 0" dt="0.02">
    <RequiredPlugin name="Sofa.Component.Collision.Detection.Algorithm"/> <!-- Needed to use components [BVHNarrowPhase BruteForceBroadPhase CollisionPipeline] -->
    <RequiredPlugin name="Sofa.Component.Collision.Detection.Intersection"/> <!-- Needed to use components [DiscreteIntersection] -->
    <RequiredPlugin name="Sofa.Component.Collision.Geometry"/> <!-- Needed to use components [SphereCollisionModel] -->
    <RequiredPlugin name="Sofa.Component.Collision.Response.Contact"/> <!-- Needed to use components [CollisionResponse] -->
    <RequiredPlugin name="Sofa.Component.Constraint.Projective"/> <!-- Needed to use components [FixedProjectiveConstraint] -->
    <RequiredPlugin name="Sofa.Component.IO.Mesh"/> <!-- Needed to use components [MeshGmshLoader MeshOBJLoader SphereLoader] -->
    <RequiredPlugin name="Sofa.Component.LinearSolver.Iterative"/> <!-- Needed to use components [CGLinearSolver] -->
    <RequiredPlugin name="Sofa.Component.Mapping.Linear"/> <!-- Needed to use components [BarycentricMapping] -->
    <RequiredPlugin name="Sofa.Component.Mass"/> <!-- Needed to use components [DiagonalMass] -->
    <RequiredPlugin name="Sofa.Component.ODESolver.Backward"/> <!-- Needed to use components [EulerImplicitSolver] -->
    <RequiredPlugin name="Sofa.Component.SolidMechanics.FEM.Elastic"/> <!-- Needed to use components [TetrahedralCorotationalFEMForceField] -->
    <RequiredPlugin name="Sofa.Component.StateContainer"/> <!-- Needed to use components [MechanicalObject] -->
    <RequiredPlugin name="Sofa.Component.Topology.Container.Dynamic"/> <!-- Needed to use components [TetrahedronSetGeometryAlgorithms TetrahedronSetTopologyContainer] -->
    <RequiredPlugin name="Sofa.GL.Component.Rendering3D"/> <!-- Needed to use components [OglModel] -->

	<CollisionPipeline name="CollisionPipeline" verbose="0" />
    <DefaultAnimationLoop/>
    <BruteForceBroadPhase/>
    <BVHNarrowPhase/>
    <DefaultContactManager name="collision response" response="PenalityContactForceField" />
	<MinProximityIntersection name="Proximity" alarmDistance="0.8" contactDistance="0.5" />

	<EulerImplicitSolver name="cg_odesolver"  />
    <CGLinearSolver name="linear solver" iterations="25" tolerance="1e-09" threshold="1e-09" />

    <Node name="Liver" gravity="0 0 0">
        <MeshGmshLoader name="meshLoader" filename="./mesh/liver.msh"/>
        <TetrahedronSetTopologyContainer name="topo" src="@meshLoader" />
        <MechanicalObject name="dofs" src="@meshLoader" />
        <TetrahedronSetGeometryAlgorithms template="Vec3" name="GeomAlgo" />
        <DiagonalMass  name="mass" massDensity="2.5" />
        <TetrahedralCorotationalFEMForceField template="Vec3" name="FEM" method="large" poissonRatio="0.3" youngModulus="3000" computeGlobalMatrix="0" />
        <FixedProjectiveConstraint  name="FixedProjectiveConstraint" indices="3 39 64" />
        <Node name="Visu" tags="Visual" gravity="0 -9.81 0">
            <OglModel  name="VisualModel" src="@../../LiverSurface" />
            <BarycentricMapping name="visual_mapping" input="@../dofs" output="@VisualModel" />
        </Node>

        <Node name="SurfLiver" gravity="0 -9.81 0">
            <SphereLoader name="sphereLoader" filename="./mesh/liver.sph" />
            <MechanicalObject name="spheres" position="@[-1].position"/>
            <SphereCollisionModel name="CollisionModel" radius="0.85" />
            <BarycentricMapping name="sphere mapping" input="@../dofs" output="@spheres" />
        </Node>

	</Node>

</Node>
